<?xml version="1.0"?>
<Node name="Root" gravity="0 0 0" time="0" animate="0">
    <RequiredPlugin name="SoftRobotsSU" pluginName="SoftRobotsSU"/>
    <VisualStyle displayFlags="hideVisualModels showBehaviorModels showMappings showForceFields"/>
    <Node name="parent node with independent DOFs">
        <EulerExplicitSolver name="ODE solver"/>
        <MechanicalObject template="Vec1d" name="angles"/>
        <UniformMass template="Vec1d" name="mass"/>
    </Node>
</Node>
